Byte := 1
kB := 1023*Byte
MB := 1023*kB
______________________________________________________________________________  # Generelle Einstellungen:
Universes := 1
Abtastzeit := 20 ms
Keyframeintervall := 25
Durchschnittskanalzahl := 30
______________________________________________________________________________  # Framegrößen:
IDdatasize := 128*Byte
Headersize := 4*Byte
CRCsize := 2*Byte
Timecodesize := 8*Byte
Keyframesize := (Headersize + CRCsize + Timecodesize) + (3*512*Byte*Universes)
Standardframesize := (Headersize + CRCsize + Timecodesize) + (3*Durchschnittskanalzahl)
______________________________________________________________________________  # Abtast- und Framefrequenzen:
FramesProSekunde := 1/Abtastzeit
KeyframesProSekunde := FramesProSekunde/Keyframeintervall
StandardframesProSekunde := FramesProSekunde - KeyframesProSekunde
Filesize := KeyframesProSekunde*Keyframesize + StandardframesProSekunde*Standardframesize
______________________________________________________________________________  # Ergebnisse:
FramesProSekunde = 50 1/s
KeyframesProSekunde = 2 1/s
StandardframesProSekunde = 48 1/s
# pro Sekunde:
Filesize*s = 7.91007 kB
# pro Minute:
Filesize*60*s = 0.463934 MB
# pro Stunde:
Filesize*3600*s = 27.836 MB
